# Исходные данные
y(x) := x
R_c := 0.91*cm
R_w := 0.5*cm
ε_1 := 7.1
w := 1*cm
n := 1
t := 0
f := 14 GHz
k := 2*π*f/c
kx(n) := π/w*n
start := 1/sqrt(ε_1)
LSEasim(k, β, n) := (sqrt((β^2*ε_1 - 1)*k^2 - kx(n)^2)/sqrt((1 - β^2)*k^2 + kx(n)^2)*tanh(sqrt((1 - β^2)*k^2 + kx(n)^2)*R_c) + tan(sqrt((β^2*ε_1 - 1)*k^2 - kx(n)^2)*(R_w - R_c)))*(cos(sqrt((β^2*ε_1 - 1)*k^2 - kx(n)^2)*(R_w - R_c))*cosh(sqrt((1 - β^2)*k^2 + kx(n)^2)*R_c))
β := 4
root(LSEasim(k, β, n), β) = 3.66882
ν := root(LSEasim(k, β, n), β)*c
y(ν) = 1.09989e11 cm/s
β := start, start*1.01 .. 10
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x := [2; 3; 4; 5; 6; 7; 8; 9; 10; 12; 14]
y := [37.84447; 25.2269; 18.91729; 15.13086; 12.60603; 10.8021; 9.44873; 8.39572; 7.55294; 5.23752; 3.66882]
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g2(f, v) := 2*π*f/v
g3(f1, v1, f2, v2) := 2*π*(f2 - f1)/(g2(f2, v2) - g2(f1, v1))
g3(2, 37.84447, 3, 25.2269) = 15.1348
a1 := g3(2, 37.84447, 3, 25.2269)
g3(3, 25.2269, 4, 18.91729) = 10.8078
a2 := g3(3, 25.2269, 4, 18.91729)
g3(4, 18.91729, 5, 15.13086) = 8.4031
a3 := g3(4, 18.91729, 5, 15.13086)
g3(5, 15.13086, 6, 12.60603) = 6.87228
a4 := g3(5, 15.13086, 6, 12.60603)
g3(6, 12.60603, 7, 10.8021) = 5.81194
a5 := g3(6, 12.60603, 7, 10.8021)
g3(7, 10.8021, 8, 9.44873) = 5.03392
a6 := g3(7, 10.8021, 8, 9.44873)
g3(8, 9.44873, 9, 8.39572) = 4.43852
a7 := g3(8, 9.44873, 9, 8.39572)
g3(9, 8.39572, 10, 7.55294) = 3.96805
a8 := g3(9, 8.39572, 10, 7.55294)
g3(10, 7.55294, 12, 5.23752) = 2.06788
a9 := g3(10, 7.55294, 12, 5.23752)
g3(12, 5.23752, 14, 3.66882) = 1.31166
a10 := g3(12, 5.23752, 14, 3.66882)
x2 := [2; 3; 4; 5; 6; 7; 8; 9; 10; 12]
y2 := [a1; a2; a3; a4; a5; a6; a7; a8; a9; a10]
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